*Heading
** Job name: 4-45_1p5 Model name: 4-45-FSI
** Generated by: Abaqus/CAE 2022
*Preprint, echo=NO, model=NO, history=NO, contact=NO
**
** PARTS
**
*Part, name=Plate
*Node
      1,  -81.2132034,   81.2132034,           0.
      2,  -81.2132034,   38.7867966,           0.
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*Element, type=S3R
1, 2653, 2505, 2470
2, 2597, 2571, 2572
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*Element, type=S4R
  7,   96,   97, 2464, 2489
  8, 2510, 2491, 2552, 2558
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*Nset, nset=PlateShell, generate
     1,  41426,      1
*Elset, elset=PlateShell, generate
     1,  40759,      1
*Nset, nset=ShellBoundary
   27,   28,   29,   30,   35,   36
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*Elset, elset=ShellBoundary
  2925,  3124,  3125,  3324,  3325,  3524
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*Elset, elset=_<LOADSURFACE>_SNEG, internal, generate
     1,  40759,      1
*Surface, type=ELEMENT, name=<LOADSURFACE>
_<LOADSURFACE>_SNEG, SNEG
** Region: (Section-2:PlateShell), (Controls:Default)
*Elset, elset=_I1, internal
     1,     2,     3,     4,     5,     6
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** Section: Section-2
*Shell Section, elset=_I1, material=<MAT>
1.5, 5
*Transverse Shear Stiffness
72916.7, 72916.7, 0.
** Region: (Section-2:PlateShell), (Controls:EC-1)
*Elset, elset=_I2, internal
     7,     8,     9,    10,    11,    12
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** Section: Section-2
*Shell Section, elset=_I2, material=<MAT>, controls=EC-1
1.5, 5
*Transverse Shear Stiffness
72916.7, 72916.7, 0.
*End Part
**
**
** ASSEMBLY
**
*Assembly, name=Assembly
**
*Instance, name=Plate-1, part=Plate
*End Instance
**
*End Assembly
**
** ELEMENT CONTROLS
**
*Section Controls, name=EC-1, hourglass=ENHANCED, second order accuracy=YES
1., 1., 1.
*Amplitude, name=Driver10Bar
             0.,              0.,          0.0001,          0.4462, 0.00147931034482759, 0.403353179334616, 0.00285862068965517, 0.364021421197428
0.00423793103448276, 0.327938361800707, 0.00561724137931035, 0.294856876200396, 0.00699655172413793, 0.264547732713157, 0.00837586206896552, 0.236798339297337
0.0097551724137931, 0.211411575720852, 0.0111344827586207, 0.188204705748233, 0.0125137931034483, 0.167008363961625, 0.0138931034482759, 0.147665612187893
0.0152724137931034, 0.130031060837949, 0.016651724137931, 0.113970050776412, 0.0180310344827586, 0.0993578916312382, 0.0194103448275862, 0.0860791527252794
0.0207896551724138, 0.0740270030661679, 0.0221689655172414, 0.0631025970685725, 0.023548275862069, 0.0532145029048911, 0.0249275862068966, 0.0442781705878096
0.0263068965517241, 0.0362154370818443, 0.0276862068965517, 0.0289540659218805, 0.0290655172413793, 0.0224273189856682, 0.0304448275862069, 0.0165735582250075
0.0318241379310345, 0.0113358753076885, 0.0332034482758621, 0.00666174725982981, 0.0345827586206897, 0.00250271632671636
*Amplitude, name=Driver15Bar
             0.,              0.,          0.0001,          0.6066, 0.000326130653266332, 0.597255606871735, 0.000552261306532663, 0.588039538224459
0.000778391959798995, 0.578950140015279, 0.00100452261306533, 0.569985778680351, 0.00123065326633166, 0.561144840888287, 0.00145678391959799, 0.552425733296464
0.00168291457286432, 0.543826882310219, 0.00190904522613065, 0.535346733844879, 0.00213517587939699, 0.526983753090603, 0.00236130653266332, 0.518736424279999
0.00258743718592965, 0.510603250458486, 0.00281356783919598, 0.502582753257369, 0.00303969849246231, 0.494673472669594, 0.00326582914572864, 0.486873966828152
0.00349195979899498, 0.479182811787102, 0.00371809045226131, 0.471598601305186, 0.00394422110552764, 0.464119946631993, 0.00417035175879397, 0.456745476296665
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0.0432909547738693, 0.00172080336267967, 0.0435170854271357, 0.0012793890143815, 0.043743216080402, 0.000846910515288722
**
** MATERIALS
**
*Material, name=AA6016_T4
*Density
 7.85e-09,
*Elastic
70000., 0.3
*Time Points, name=TimePoints-1, GENERATE
0., 0.0001, 0.0001
0.0001, 0.0015, 0.0001
** ----------------------------------------------------------------
**
** STEP: Load
**
*Step, name=Load, nlgeom=YES
*Dynamic, Explicit
, 0.0015
*Bulk Viscosity
0.06, 1.2
**
** BOUNDARY CONDITIONS
**
** Name: FixedEnd Type: Symmetry/Antisymmetry/Encastre
*Boundary
Plate-1.ShellBoundary, ENCASTRE
**
** LOADS
**
** Name: Pressure   Type: Pressure
*Dsload, amplitude=<AMP>
Plate-1.<LOADSURFACE>, PNU, 1.
**
** OUTPUT REQUESTS
**
*Restart, write, number interval=1, time marks=NO
**
** FIELD OUTPUT: F-Output-1
**
*Output, field, time points=TimePoints-1
*Node Output
U,
*Element Output, directions=YES
MISES, P, S, SDV, STATUS, TRIAX
**
** HISTORY OUTPUT: H-Output-1
**
*Output, history, variable=PRESELECT
*End Step
